CF := 1.4*10^-9  # величина программируемого конденсатора внутреннего осцилятора
RFmin := 3*10^3  # величина программируемого резистора минимальной частоты внутреннего осцилятора
RFmax := 2*10^3  # величина программируемого резистора максимальной частоты внутреннего осцилятора
Rss := 680  # резистор мягкого старта
fmin := 1/(3*CF*RFmin) = 79365.1  # минимальная частота работы миксрохемы
fmax := 1/(3*CF*RFmax) = 119048  # максимальная частота работы миксрохемы
fstart := 1/(3*CF*Rss) = 350140  # рекомендуется брать в 4 раза больше чем fmin
Css := 3*10^-3/Rss = 4.41176e-6  # конденсатор мягкого старта
10/fmin = 0.000126  # тау цепи измерения тока с ипользованием ёмкостного шунта
Rb := 1*10^3
Cb := 130*10^-9  # величина элементов ёмкостного шунта
Rb*Cb = 0.00013
1/(2*π*(Rb*Cb)) = 1224.27  # частота rc цепи шунта
Icrkpx := 55  # максимальный ток проходящий через резонансный конденсатор
Cr := 330*10^-9  # величина резонансного конденсатора
Ca := 15*10^-12
0.8*π/Icrkpx*(1 + Cr/Ca) = 1005.36  # произведение необходимое для расчёта конденсаторов
Cdelay := 1*10^-6  # конденсатор в цепи задержки
Tmp := 10*Cdelay = 1e-5
# время сдвига фазы 100(мс) втечение этого времени L6599 работает на частоте
# близкой к fstart
Rdelay := 10*10^3
Tstop := 2.5*Rdelay*Cdelay = 0.025  # время перезапуска микросхемы после разряда конденсатора на величину меньше чем 0,3 В
Uinon := 10  # Пороговое напряжение включения
Uinoff := 9.5  # Пороговое напряжение выключения
Rh := (Uinon - Uinoff)/(15*10^-6) = 33333.3
# Резисторы делителя на ногу питания LINE
Rl := 1.25/(Uinoff - 1.25)*Rh = 5050.51
Qg := 120*10^-9  # полный заряд затвора транзистора
Rds := 18*10^-3  # сопротивление открытого канала
Td := 0.3*10^-6  # мертвое время(задержка)
Uf := 0.6  # падение напряжения на диоде DBST при токе 0.1A и температуре перехода TJ = 80°C
Vdrop := Qg/(Tstop - Td)*Rds + Uf = 0.6  # падение напряжения на микросхеме
Uвхmax := 40  # максимальное входное напряжение
Udrv := 16  # напряжения питания драйвера и амплитуда управляющего сигнала
ΔUbst := 0.5  # пульсация напряжения на конденсаторе CBST в установившемся режиме
ΔUbstmax := 3
# максимальное падение напряжения на CBST перед тем как сработает схема защиты
# от пониженного напряжения или амплитуда управляющего сигнала станет
# недостаточной
Rgs := 5.1*10^3  # величина резистора RGS
Ir := 10*10^-6
# ток утечки диода DBST при максимальном входном напряжении и температуре его
# перехода TJ = 80°C
Ilk := 1*10^-6
# ток утечки схемы сдвига уровня при максимальном входном напряжении и
# температуре кристалла TJ = 100°C
fdrv := 100*10^3  # частота преобразования
Toff := 400*10^-6
# время переходного процесса при резком пропадании нагрузки - в течении этого
# времени силовой ключ закрыт
Tontr := 200*10^-6
# время переходного процесса при резком подключении нагрузки - в течении этого
# времени силовой ключ открыт и ток в выходном дросселе непрерывно нарастает
Iqbs := 1*10^-3
Cbst2 := ((Ir + Ilk + Iqbs + (Udrv - Uf)/Rgs)*Toff + Qg)/ΔUbstmax = 5.77414e-7  # ёмкость бустрепного конденсатора
