y := [48.88; 48.73; 48; 46; 25.89; 20.75; 8.12; 2.36]
x := [250; 500; 1000; 2000; 8000; 10000; 20000; 40000]
f := [-3.4; -6.9; -13.6; -26.7; -84; -97.1; -133.7; -163]
T1 := 1/(2*3.14*9*10^3) = 1.76929e-5
k := 0, 1 .. 7
y[1] = 48.73
W1(p) := 50/(T1*p + 1)^2
f[5] = -97.1
20*log(|W1(1i*2*π*f[5])|) = 33.9784
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1/(2*3.14*9*10^3) = 1.76929e-5
T2 := 1/(2*π*2000) = 7.95775e-5
f := 10, 200 .. 100000
Wk(p) := 100/(p*(T2*p + 1))
Wr(p) := Wk(p)*W1(p)
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