# Вариант № 344
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# Параметры структурной схемы:
Tм/Tэ == k
k := 4
# - отношение электромеханической и электромагнитной
# постоянных времени
Tп := 0.005  # (c)  # - постоянная времени преобразователя.
Kп := 40  # - коэфициент передачи преобразователя.
Tом := 0.002  # (c)  # -постоянная времени звена обратной связи по моменту
Tос := 0.004  # (c)  # -постоянная времени звена обратной связи по скорости
tпп := 0.08  # (c)  # - время переходного процесса.
# Номинальные данные двигателя
Pн := 1500  # (Вт)  # - номинальная мощность.
Nн := 2000  # (об/мин)  # - номинальное число оборотов.
Iн := 9  # (А)  # - номинальный ток якоря.
Rд := 2  # (Ом)  # - активное сопротивление двигателя.
Rця := 4  # (Ом)  # - активное сопротивление цепи якоря двигателя.
8*Tп = 0.04
J := 0.042  # (кг*м^2)  # - момент инерции.
Uн := 220  # (В)  # - номинальное напряжение якоря.
Uл := 10  # (В)
# - максимальное напряжение, при котором операционный усилитель,
# применяемый для усиления сигнала обратной связи, работает в
# линейном режиме.
# 1. Расчёт параметров ЭМС
ωн := Nн/60*2*π
ωн = 209.44  # - номинальная скорость вращения двигателя (рад/с)
C := (Uн - Iн*Rд)/ωн
C = 0.964479  # - машинная постоянная (В*с)
ω0 := Uн/C
ω0 = 228.102  # - скорость холостого хода
# Снижение скорости двигателя при номинальном моменте нагрузки Мн относительно скорости холостого хода wo (рад/с):
Δωн := (ω0 - ωн)*Rця/Rд
Δωн = 37.3259
Mн := C*Iн
Mн = 8.68031  # - номинальный крутящий момент двигателя (А*В*с)
Kд1 := Mн/Δωн
Kд1 = 0.232555  # - добротность механической характеристики (Н*м*с)
Kд2 := Δωн/Mн
Kд2 = 4.30006
# - жесткость механической характеристики
# двигателя (1/(Н*м*с))
Tм := J/Kд1
Tм = 0.180603  # - электромеханическая постоянная времени (c)
Tэ := Tм/k
Tэ = 0.0451506  # - электромеханическая постоянная времени цепи якоря (с)
Kом := Uл/(2*Mн)
Kом = 0.576016  # - максимальный коэффициент передачи обратной связи в контуре регулирования момента (1/(А*с))
Kом := 1.3
Koc := Uл/ωн
Koc = 0.0477465  # - минимальный коэффициент передачи обратной связи в контуре регулирования скорости (В*с)
Koc := 0.1
# 2. Проведение анализа ЭМС
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# Передаточные функции элеменов эмс
Wд1(p) := Kд1/(Tэ*p + 1)
Wд2(p) := Kд2/(Tм*p)
Wом(p) := Kом/(Tом*p + 1)
Wп(p) := Kп/C/(Tп*p + 1)
# 2.1 Анализ контура регулирования момента
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# Передаточная функция разомкнутой цепи
Wрцм == Wп(p)*Wд1(p)*Wом(p) == Kп/С/(Tп*p + 1)*Kд1/(Tэ*p + 1)*Kом/(Tом*p + 1)
Wрцм(p) := Kп*Kд1*Kом/(C*(p*Tэ + 1)*(p*Tп + 1)*(p*Tом + 1))
# Передаточная функция контура регулирования момента относительно момента
Wм(p) == Wп(p)*Wд1(p)/(1 + Wп(p)*Wд1(p)*Wом(p)) == Kп/C/(Tп*p + 1)*Kд1/(Tэ*p + 1)/(1 + Kп/C/(Tп*p + 1)*Kд1/(Tэ*p + 1)*Kом/(Tом*p + 1)) == Kп/C*Kд1*(Tом*p + 1)/((Tэ*p + 1)*(Tп*p + 1)*(Tом*p + 1) + Kп/C*Kд1*Kом)
Wм(p) := Kп/C*Kд1*(Tом*p + 1)/((Tэ*p + 1)*(Tп*p + 1)*(Tом*p + 1) + Kп/C*Kд1*Kом)
# Характеристический полином
A_м(p) := (Tэ*p + 1)*(Tп*p + 1)*(Tом*p + 1) + Kп/C*Kд1*Kом
# Вектор характеристического полинома для контура регулирования момента
aм := [Kп*Kд1*Kом/C + 1; Tэ + Tп + Tом; Tэ*Tп + Tэ*Tом + Tп*Tом; Tэ*Tп*Tом]
# Анализ устойчивости контура по критерию Гурвица
Δм := det([aм[2], aм[0]; aм[3], aм[1]])
Δм = 1.08913e-5  # - контур устойчив
aм[2]*aм[1] - aм[0]*aм[3] == 0
aм[2]*aм[1] - Kмгр*aм[3] == 0
Kмгр := aм[1]*aм[2]/aм[3]
Kмгр == 36.66
# Коэффициент передачи разомкнутой цепи контура регулирования момента
Kмр := Kп/C*Kд1*Kом
Kмр = 12.5382
# Kмр = 12.538 < Kмгр = 36.66, значит, устойчивость контура доказана
# Логарифмические и частотные характеристики
# Расчетная формула для точной ЛАЧХ
Gм(ω) := 20*log(|Wрцм(1i*ω)|)
ω := 1, 1.1 .. 999.9
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# Расчетная формула для точной ЛФЧХ
Fм(ω) := arg(Kп*Kд1/(C*(1 + ω*Tэ*1i)*(1 + ω*Tп*1i))) + arg(Kом/(1 + ω*Tом*1i))
ω := 0.1, 0.2 .. 9999
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# Частота среза:
ω := 190
Given
Gм(ω) == 0
ωср := Find(ω)
ωср = 188.058
# Частота переворота фазы
ω := 330
Given
Fм(ω) == -π
ωπ := Find(ω)
ωπ = 339.858
# Запас устойчивости по фазе (в градусах)
ΔFм := (π + Fм(ωср))*180/π
ΔFм = 32.8674
# Запас устойчивости по амплитуде (дБ)
ΔGм := |Gм(ωπ)|
ΔGм = 9.31924
# Расчет и построение переходных характеристик контура.
# Определение показателей качества регулирования
# Числитель, характеристический полином, вектор коэффициентов характеристического полинома и его проивзодная по переменной p передаточной функции контура регулирования момента относительно момента
Bм(p) := Kп/C*Kд1*(Tом*p + 1)
Aм(p) := (Tэ*p + 1)*(Tп*p + 1)*(Tом*p + 1) + Kп/C*Kд1*Kом
Sм(p) := d/dp(Aм(p))
aм := [Kп*Kд1*Kом/C + 1; Tэ + Tп + Tом; Tэ*Tп + Tэ*Tом + Tп*Tом; Tэ*Tп*Tом]
# Корни характеристического уравнения
pм := polyroots(aм)
pм = [-613.545; -54.3013 + 214.295i; -54.3013 - 214.295i]
# Пусковой момент двигателя в контуре регулирования момента (А*В*с)
Mп := 2.5*Mн
Mп = 21.7008
# Задающее напряжение для контура регулирования момента (В):
Uзм := Mп*(Kом + C/(Kп*Kд1))
Uзм = 30.461
# Установившееся значение момента отсечки
M0 := Uзм*Bм(0)/Aм(0)
M0 = 21.7008
# Переходная функция по задающему воздействию для контура регулирования момента
M(t) := M0 + Uзм*Re(sum(Bм(pм[k])*exp(pм[k]*t)/(pм[k]*Sм(pм[k])), k = 0 .. 2))
t := 0, 0.001 .. 0.1
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# Время переходного процесса относительно момента
t := 0.05
Given
M(t) == 1.05*Mп
tnм := Find(t)
tnм = 0.0486494
# Время, соответствующее максимуму
t := 0.01
Given
d/dt(M(t)) == 0
tмm := Find(t)
tмm = 0.0142762
# Максимальное значение
Mmax := M(tnм)
Mmax = 22.7858
# Перерегулирование при подаче задающего воздействия
σgм := (Mmax - Mп)/Mп
σgм = 5 %
# Передаточная функция контура регулирования момента относительно скорости
Wω(p) == Wм(p)*Wд2(p) == Kп*Kд1/C*(Tом*p + 1)/((Tп*p + 1)*(Tэ*p + 1)*(Tом*p + 1) + Kп*Kд1*Kом/C)*Kд2/(Tм*p)
Wω(p) := Kп*Kд1/C*(Tом*p + 1)/((Tп*p + 1)*(Tэ*p + 1)*(Tом*p + 1) + Kп*Kд1*Kом/C)*Kд2/(Tм*p)
Ω(p) := Uзм*Kп/C*(Tом*p + 1)/(((Tп*p + 1)*(Tэ*p + 1)*(Tом*p + 1) + Kп*Kд1*Kом/C)*Tм*p^2)
# Составляющая скорости, определяемая простыми полюсами передаточной функции
ω1(t) := Uзм*Kд2/Tм*Re(sum(Bм(pм[k])*exp(pм[k]*t)/(pм[k]^2*Sм(pм[k])), k = 0 .. 2))
# Составляющая скорости определяемая нулевыми полюсами крастности 2 передаточной функции
ω2(t, p) := Uзм*Kд2/Tм*Re(d/dp(Bм(p)*exp(p*t)/Aм(p)))
ω00 := Kп/C*(Uзм - Mп*Kом)
ω00 = 93.3146
ω0 = 228.102
# Переходная характеристика
Δω := Mп*Bм(0)/Aм(0)
Δω = 15.4599
ωsum(t) := ω1(t) + ω2(t, 0)
t := 0, 0.01 .. 0.4
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# Время пуска системы до отключения компенсационной связи:
t := 0.3
Given
ωsum(t) == ω00 - Δω
tnм := Find(t)
tnм = 0.152534
# 2.2 Анализ контура регулирования скорости
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Wос_экв(p) == 1/Wп(p) + Wос(p) == (Tп*p + 1)/(Kп/C) + Koc/(Tос*p + 1) == C*((Tп*p + 1)*(Tос*p + 1) + Kп/C*Koc)/(Kп*(Tос*p + 1))
# Передаточная функция разомкнутой цепи:
Wрц_ω(p) == Wп(p)*Wд1(p)*Wд2(p)*Wос_экв(p) == Kп/C/(Tп*p + 1)*Kд1/(Tэ*p + 1)*Kд2/(Tм*p)*C*((Tп*p + 1)*(Tос*p + 1) + Kп/C*Koc)/(Kп*(Tос*p + 1)) == ((Tп*p + 1)*(Tос*p + 1) + Kп/C*Kос)/(Tм*p*(Tэ*p + 1)*(Tп*p + 1)*(Tос*p + 1))
Wрц_ω(p) := ((Tп*p + 1)*(Tос*p + 1) + Kп/C*Koc)/(Tм*p*(Tэ*p + 1)*(Tп*p + 1)*(Tос*p + 1))
# Передаточная функция замкнутой цепи по задающему воздействию:
Wзg_ω(p) == Wп(p)*Wд1(p)*Wд2(p)/(1 + Wрц_ω(p)) == Kп/C/(Tп*p + 1)*Kд1/(Tэ*p + 1)*Kд2/(Tм*p)/(1 + ((Tп*p + 1)*(Tос*p + 1) + Kп/C*Koc)/(Tм*p*(Tэ*p + 1)*(Tп*p + 1)*(Tос*p + 1))) == Kп/C*(Tос*p + 1)/(Tм*p*(Tэ*p + 1)*(Tп*p + 1)*(Tос*p + 1) + (Tп*p + 1)*(Tос*p + 1) + Kп/C*Koc)
Wзg_ω(p) := Kп/C*(Tос*p + 1)/(Tм*p*(Tэ*p + 1)*(Tп*p + 1)*(Tос*p + 1) + (Tп*p + 1)*(Tос*p + 1) + Kп/C*Koc)
# Передаточная функция замкнутой цепи по возмущающему воздействию:
Wзf_ω(p) := Wд2(p)/(1 + Wрц_ω(p)) == Kд2/(Tм*p)/(1 + ((Tп*p + 1)*(Tос*p + 1) + Kп/C*Koc)/(Tм*p*(Tэ*p + 1)*(Tп*p + 1)*(Tос*p + 1))) == Kд2*(Tэ*p + 1)*(Tп*p + 1)*(Tос*p + 1)/(Tм*p*(Tэ*p + 1)*(Tп*p + 1)*(Tос*p + 1) + (Tп*p + 1)*(Tос*p + 1) + Kп/C*Koc)
Wзf_ω(p) := Kд2*(Tэ*p + 1)*(Tп*p + 1)*(Tос*p + 1)/(Tм*p*(Tэ*p + 1)*(Tп*p + 1)*(Tос*p + 1) + (Tп*p + 1)*(Tос*p + 1) + Kп/C*Koc)
Wзg_ω(p) := Kп/C*(Tос*p + 1)/(Tм*p*(Tэ*p + 1)*(Tп*p + 1)*(Tос*p + 1) + (Tп*p + 1)*(Tос*p + 1) + Kп/C*Koc)
# Характеристический полином:
Aω(p) := Tм*p*(Tэ*p + 1)*(Tп*p + 1)*(Tос*p + 1) + (Tп*p + 1)*(Tос*p + 1) + Kп/C*Koc
# Вектор коэффициентов характеристического полинома:
aω := [
    Koc*Kп/C + 1;
    Tм + Tп + Tос;
    Tэ*Tм + Tм*Tп + Tм*Tос + Tп*Tос;
    Tэ*Tм*Tп + Tэ*Tм*Tос + Tм*Tп*Tос;
    Tэ*Tм*Tп*Tос
]
# Главный минор определителя Гурвица
Δω := det([aω[3], aω[1], 0; aω[4], aω[2], aω[0]; 0, aω[3], aω[1]])
Δω = 1.0669e-7  # - контур устойчив
# Коэффициент передачи контура:
Kpω := Koc*Kп/C
Kpω = 4.14732
# Граничный коэффициент передачи контура:
Kgω := aω[1]*(aω[3]*aω[2] - aω[4]*aω[1])/aω[3]^2 - 1
Kgω = 22.1415
# Kgω > Kpω, следовательно контур устойчив
# Расчет и построение переходных характеристик контура.
# Определение показателей качества регулирования
Gω(ω) := 20*log(|Wрц_ω(1i*ω)|)
ω := 1, 1.1 .. 999.9
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Fω(ω) := arg(((Tп*1i*ω + 1)*(Tос*1i*ω + 1) + Kп/C*Koc)/((Tп*1i*ω + 1)*(Tэ*1i*ω + 1)*(Tос*1i*ω + 1))) - π/2
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# Частота среза (рад/с):
ω := 10
Given
Gω(ω) == 0
ωср := Find(ω)
ωср = 20.6462
# Частота переворота фазы: | π
ω := 20
Given
Fω(ω) == -π
ωπ := Find(ω)
ωπ = 54.6091
# Запас устойчивости по фазе (в градусах)
ΔFω := (π + Fω(ωср))*180/π
ΔFω = 38.4659
# Запас устойчивости по амплитуде (дБ)
ΔGω := |Gω(ωπ)|
ΔGω = 14.7237
# Расчёт и построение переходных характеристик контура. Определение основных показателей качества регулирования
Aω(p) := Tм*p*(Tэ*p + 1)*(Tп*p + 1)*(Tос*p + 1) + (Tп*p + 1)*(Tос*p + 1) + Kп/C*Koc
Sω(p) := d/dp(Aω(p))
# Числитель передаточной функции контура по задающему воздействию:
Bω(p) := Kп/C*(Tос*p + 1)
# Числитель передаточной функции контура по возмущающему воздействию:
Cω(p) := Kд2*(Tэ*p + 1)*(Tп*p + 1)*(Tос*p + 1)
# Корни характеристического уравнения:
pω := polyroots(aω)
pω = [-236.076; -218.955; -8.55819 - 23.1809i; -8.55819 + 23.1809i]
# Задающее воздействие для контура регулирования скорости (В):
Uзω := ω0*(C + Kп*Koc)/Kп
Uзω = 28.3102
# Переходные функции по задающему и возмущающему воздействиям:
ωg(t) := ω0 + Uзω*Re(sum(Bω(pω[k])*exp(pω[k]*t)/(pω[k]*Sω(pω[k])), k = 0 .. 3))
t0 := 0.1
ωfc(t) := Mн*Re(sum(Cω(pω[k])*exp(pω[k]*t)/(pω[k]*Sω(pω[k])), k = 0 .. 3))
ωf(t) := if(t < t0, ω0, ωн - ωfc(t - t0))
t := 0, 0.001 .. 0.5
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# Время, соответствующее максимуму скорости для передаточной функции по задающему воздействию(с)
t := 0.1
Given
d/dt(ωg(t)) == 0
tmax := Find(t)
tmax = 0.14051
# Максимальное значение скорости (рад/с)
ωmax := ωg(tmax)
ωmax = 299.1
# Перерегулирование при подаче задающего воздействия
σcg1 := (ωmax - ω0)/ω0
σcg1 = 31.1252 %
# Время переходного процесса при подаче задающего воздействия (с)
t := 0.32
Given
ωg(t) == 0.95*ω0
tng1 := Find(t)
tng1 = 0.324066
t := 0, 0.001 .. 1.5
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# Время, соответствующее минимуму скорости (с) для переходной характеристики по возмущению
t := 0.15
Given
d/dt(ωf(t)) == 0
tmin := Find(t)
tmin = 0.190424
# Минимальное значение скорости для переходной характеристики по возмущению, рад/с
ωmin := ωf(tmin)
ωmin = 205.386
# Перерегулирование при подаче возмущающего воздействия
# (номинального момента)
σf := (ωн - ωmin)/ωн
σf = 1.93532 %
# Время переходного процесса при подаче возмущаеющего воздействия (с)
t := 0.19
Given
tpp := Find(t)
ωf(t) == 1.05
tpp = 0
# 2.3 Механическая характеристика нескорректированной ЭМС
ω1(M) := Uзω*(Kп/(C + Koc*Kп)) - M*C/Kд1/(C + Koc*Kп)
ω2(M) := Uзм*Kп/C - M*(1/Kд1 + Kп/C*Kом)
# Момент отсечки на МХ ЭМС
Mот := (ω2(0) - ω1(0))/(1/Kд1*(1 - 1/(1 + Koc*Kп/C)) + Kп/C*Kом)
Mот = 18.0414
ω1(Mот) = 213.031
ω(M) := if(M < Mот, ω1(M), 0)
M := 0, 0.001 .. 20
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# Статизм внешней характеристики конутра регулирования скорости
S := (ω0 - ω(Mн))/ω0
S = 3.17906 %
# Нескорректированная ЭМС не удовлетворяет требованиям ТЗ по  быстродействию и требует проведения коррекции (синтеза)
8*Tп = 0.04
# 3 Синтез ЭМС
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# Для контура регулирования момента
# Для контура регулирования скорости
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# Эквивалетная передаточная функция, получающаяся при переносе сумматора:
T1 := Tм/2 + sqrt(Tм^2/4 - Tм*Tэ)  # с
T2 := Tм/2 - sqrt(Tм^2/4 - Tм*Tэ)
T2 = 0.0903013
T1 = 0.0903013
# Т.к.
Tм/Tэ = 4
Wэкв(p) := Kд2*(Tэ*p + 1)/((T1*p + 1)*(T2*p + 1))
# 3.1 Синтез контура регулирования момента
Tэ/Tом = 22.5753
# Нескомпенсируемая постояннаявремени(c):
tпп := 0.55  # корректривка ТЗ
Tμp := tпп/8
Tμp = 0.06875
# В качестве Tμ  выберем ближайшую к расчетной меньшую
# постоянную времени. Таковой в данном контуре является Tэ
Tμ := Tэ
Tэ = 0.0451506
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# Определим передаточную функцию корректирующего устройства в контуре регулирования момента
WpТО(p) == Wpм(p)*Wп(p)*Wд1(p)*Wом(p)
1/(2*Tэ*p*(Tэ*p + 1)) == Wрм*Kп/С/(Tп*p + 1)*Kд1/(Tэ*p + 1)*Kом/(Tом*p + 1)
Wpм(p) := C*(p*Tп + 1)*(p*Tом + 1)/(2*p*Tэ*Kп*Kд1*Kом)
# Таким образом, регулятор момента представляет собой ПИД-регулятор, т.е.
Wpм(p) == Kпид*(Tпид1*p + 1)*(Tпид2*p + 1)/p
Kпид == C/(2*Tэ*Kп*Kд1*Kом)  # коэффициент передачи ПИД регулятора
Tпид1 == Tп
Tпид2 == Tом
# Передаточная функция разомкнутой цепи для контура регулирования момента, настроенного на ТО
Wрцм(p) == Wрм(p)*Wп(p)*Wд1(p)*Wом(p) == C/(2*Tэ*Kп*Kд1*Kом)*(Tп*p + 1)*(Tом*p + 1)/p*Kп*Kд1*Kом/(C*(p*Tэ + 1)*(p*Tп + 1)*(p*Tом + 1)) == 1/(2*Tэ*p*(Tэ*p + 1))
Wрцм(p) := 1/(2*Tэ*p*(Tэ*p + 1))
# Передаточная функция замкнутого контура регулирования момента по задающему воздействию:
Wздм(p) == Wрцм(p)/(1 + Wрцм(p))*1/Wом(p) == 1/(2*Tэ*p*(Tэ*p + 1))/(1 + 1/(2*Tэ*p*(Tэ*p + 1)))*(Tом*p + 1)/Kом == (Tом*p + 1)/Kом/(2*Tэ^2*p^2 + 2*Tэ*p + 1) == Bм(p)/Aм(p)
Gм(ω) := 20*log(|Wрцм(1i*ω)|)
Fм(ω) := arg(Wрцм(1i*ω))*180/π
ω := 1, 1.2 .. 999.9
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# Частота среза:
ω := 10
Given
Gм(ω) == 0
ωср := Find(ω)
ωср = 10.0794
# Ожидаемое время переходного процесса в контуре (с)
tппм := 2/ωср
tппм = 0.198425
# Запас устойчивости по фазе (в градусах)
ΔF := 180 + Fм(ωср)
ΔF = 65.5302
# Запас устойчивости по амплитуде равен бесконечности, т.к. ЛФЧХ асимптотически стремится к значению -180 градусов
# Расчёт переходной характеристики синтезированного контура. Определение основных показателей качества регулирования.
# Вектор коэффициентов характеристического полинома, сам характеристический полином, производная от него, корни характеристического уравнения и числитель передаточной функции замкнутого синтезированного контура регулирования момента
2*Tэ^2*p^2 + 2*Tэ*p + 1
aм := [1; 2*Tэ; 2*Tэ^2]
Aм(p) := aм[2]*p^2 + aм[1]*p + aм[0]
Sм(p) := d/dp(Aм(p))
pм := polyroots(aм)
pм = [-11.074 - 11.074i; -11.074 + 11.074i]
Bм(p) := (Tом*p + 1)/Kом
# Задающее воздействие (В):
Uзм := Mп*Kом
Uзм = 28.211
# Переходная функция контура регулирования момента
M(t) := Mп + Uзм*Re(sum(Bм(pм[k])*exp(pм[k]*t)/(pм[k]*Sм(pм[k])), k = 0 .. 1))
t := 0, 0.001 .. 0.5
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# Время, соответствующее максимуму переходной характеристики,
# (с), максимальное значение момента ( А*В*с) и перерегулирование
t := 0.2
Given
d/dt(M(t)) == 0
tmax := Find(t)
tmax = 0.281645
Mmax := M(tmax)
Mmax = 22.639
σм := (Mmax - Mп)/Mп
σм = 4.32358 %
# Время переходного процесса в контуре регулирования момента (c)
t := 0.282
Given
M(t) == 0.95*Mп
tппм := Find(t)
tппм = 0.185043
4*Tμ = 0.180603
tпп/tппм = 2.97228
# Вывод:
# Контур точно настроен на ТО. Перерегулирование не превышает 5%, время переходного процесса tппм приблизительно равно 4Tμ и немного меньше меньше ожидаемого.
# 3.2 Синтез контура регулирования скорости
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# Передаточная функция замкнутого контура регулирования момента, в которой опущен член при p^2
Wздм'(p) := (Tом*p + 1)/(Kом*(2*Tэ*p + 1))
# Произведём настройку на ТО, учитывая, что для внешнего контура Tμ2 = 2*Tμ1:
Wω_ТО(p) == Wpc*Wздм'(p)*Wэкв(p)*Wос(p)
1/(4*Tэ*p*(2*Tэ*p + 1)) == Wpc*(Tом*p + 1)/(Kом*(2*Tэ*p + 1))*Kд2*(Tэ*p + 1)/((T1*p + 1)*(T22*p + 1))*Koc/(Tос*p + 1)
Wpc(p) := Kом*(T1*p + 1)*(T2*p + 1)*(p*Tос + 1)/(4*Koc*p*Tэ*Kд2*(p*Tэ + 1)*(p*Tом + 1))
# ПИД-регулятор:
Kпид := Kом/(4*Koc*Tэ*Kд2)
Tпид1 := T1
Tпид2 := Tос = 0.004
Wпид(p) := Kпид*(Tпид1*p + 1)*(Tпид2*p + 1)/p
# Двухзвенный фильтр:
Wф(p) := (T1*p + 1)/(Tэ*Tом*p^2 + (Tэ + Tом)*p + 1)
# Т.к
Tэ/Tом = 22.5753  # , то членом при p^2 пренебрегаем и заменяем двухзвенный фильтр однозвенным
Wф(p) := (T1*p + 1)/((Tэ + Tом)*p + 1)
# Получим передаточную функцию разомкнутой цепи для  скорректированного контура регулирования скорости:
Wрцсω(p) == Wpc(p)*Wздм(p)*Wэкв(p)*Wос(p) == Kом/(4*Koc*Kд2*Tэ)*(T1*p + 1)*(T22*p + 1)/p*(Tос*p + 1)/((Tэ + Tом)*p + 1)*(Tом*p + 1)/(Kом*(2*Tэ*p*(Tэ*p + 1) + 1))*Kд2*(Tэ*p + 1)/((T1*p + 1)*(T22*p + 1))*Koc/(Tос*p + 1) == □
Wрцсω(p) := (p*Tэ + 1)*(p*Tом + 1)/(4*p*Tэ*(2*p^2*Tэ^2 + 2*p*Tэ + 1)*(p*Tэ + p*Tом + 1))
# Передаточная функция замкнутого синтезированного контура:
Wзω(p) == Wрцсω(p)/(1 + Wрцсω(p))*1/Wос(p) == (p*Tэ + 1)*(p*Tом + 1)/(4*p*Tэ*(2*p^2*Tэ^2 + 2*p*Tэ + 1)*(p*Tэ + p*Tом + 1))/(1 + (p*Tэ + 1)*(p*Tом + 1)/(4*p*Tэ*(2*p^2*Tэ^2 + 2*p*Tэ + 1)*(p*Tэ + p*Tом + 1)))*(Tос*p + 1)/Koc == (p*Tэ + 1)*(p*Tом + 1)/(4*p*Tэ*(2*p^2*Tэ^2 + 2*p*Tэ + 1)*(p*Tэ + p*Tом + 1) + (p*Tэ + 1)*(p*Tом + 1))*(Tос*p + 1)/Koc
Wзω(p) := (Tэ*p + 1)*(Tом*p + 1)*(Tос*p + 1)/(Koc*(4*p*Tэ*(2*p^2*Tэ^2 + 2*p*Tэ + 1)*(p*Tэ + p*Tом + 1) + (p*Tэ + 1)*(p*Tом + 1)))
# Построение ЛАЧХ и ЛФЧХ:
Gω(ω) := 20*log(|Wрцсω(1i*ω)|)
Fl(ω) := arg((Tэ*(1i*ω) + 1)*(Tом*(1i*ω) + 1)/(((Tэ + Tом)*(1i*ω) + 1)*(2*Tэ*(1i*ω)*(Tэ*(1i*ω) + 1) + 1)))
Fω(ω) := (Fl(ω) - π/2)*180/π
ω := 1 .. 999.9
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# Частота среза (рад/c):
ω := 10
Given
Gω(ω) == 0
ωср := Find(ω)
ωср = 5.48194
# Частота переворота фазы (рад/c):
ω := 10
Given
Fω(ω) == -180
ωπ := Find(ω)
ωπ = 15.7826
# Запасы устойчивости по фазе (в градусах) и амплитуде (дБ)
ΔGω := |Gω(ωπ)|
ΔGω = 12.3021
ΔFω := 180 + Fω(ωср)
ΔFω = 60.6083
# Запас устойчивости по аплитуде не бесконечный, а по фазе немного меньше, чем при точной настройке на ТО, следует ожидать ухудшения качества регулирования
# Расчёт переходной характеристики для контура регулирования скорости при его настройке на ТО
aω := [1; 5*Tэ + Tом; 12*Tэ^2 + 5*Tом*Tэ; 16*Tэ^3 + 8*Tом*Tэ^2; 8*Tэ^4 + 8*Tом*Tэ^3]
Aω(p) := aω[4]*p^4 + aω[3]*p^3 + aω[2]*p^2 + aω[1]*p + 1
Sω(p) := d/dp(Aω(p))
Bω(p) := (Tэ*p + 1)*(Tом*p + 1)*(Tос*p + 1)/Koc
pω := polyroots(aω)
pω = [-20.8545; -11.344; -5.57912 - 9.51959i; -5.57912 + 9.51959i]
# Задающее напряжение для контура регулирования скорости (В):
Uзω := ω0*Koc
Uзω = 22.8102
# Переходная функция контура регулирования скорости при его настройке на ТО
ω(t) := ω0 + Uзω*Re(sum(Bω(pω[k])*exp(pω[k]*t)/(pω[k]*Sω(pω[k])), k = 0 .. 3))
t := 0, 0.001 .. 1
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# Время, соответствующее максимуму переходной характеристики для контура регулирования скорости при его настройках на ТО
t := 0.4
Given
d/dt(ω(t)) == 0
tmax := Find(t)
tmax = 0.442695
ωmax := ω(tmax)
ωmax = 246.377
# Перерегулирование
σc := (ωmax - ω0)/ω0
σc = 8.0115 %
# Время переходного процесса в контуре регулирования скорости при его настройке на ТО (c):
t := 0.538
Given
ω(t) == 1.05*ω0
tппс := Find(t)
tппс = 0.536105
tпп/tппс = 1.02592
# Механическая характеристика:
ω(M) := if(M < Mп, ω(t), 0)
M := 0, 0.1 .. 25
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# Вывод: перерегулирование превысило 5% и составило 8,01%. При этом время переходного процесса составило tппс = 0,536, а значит, ТЗ выполнено.
# Модель нескорректированного контура регулирования скорости по его структурной схеме
# 4 Электронное моделирование нескорректированного контура регулирования скорости по его структурной схеме
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# Передаточные функции элеменов эмс
Wос(p) := Koc/(Tос*p + 1)
Wп(p) := Kп/C/(Tп*p + 1)
Wд1(p) := Kд1/(Tэ*p + 1)
Wд2(p) := Kд2/(Tм*p)
Wом(p) := Kом/(Tом*p + 1)
# Инерционное звено Wп(p)
K1 := Kп/C
K1 = 41.4732
R5 := 10^5  # Ом
R6 := K1*R5
R6 = 4147317  # Ом
C1 := Tп/R6
C1 = 1.2056e-9  # Ф
# Инерционное звено Wд1(p)
K2 := Kд1
K2 = 0.232555
R7 := 10^5  # Ом
R8 := K2*R7
R8 = 23255.5  # Ом
C2 := Tэ/R8
C2 = 1.9415e-6  # Ф
# Инерционное звено Wоc(p)
K3 := Koc
K3 = 0.1
R9 := 10^5  # Ом
R10 := K3*R9
R10 = 10000  # Ом
C3 := Tос/R10
C3 = 4e-7  # Ф
# Интегрирующее звено Wд2(p)
K4 := Kд2/Tм
K4 = 23.8095
R11 := 10^5  # Ом
C4 := 1/(K4*R11)
C4 = 4.2e-7  # Ф
# Форсирующее звено 1/Wп(p)
1/Wп(p) == (Tп*p + 1)/(Kп/C)
K5 := C/Kп
K5 = 0.024112
R12 := 10^5  # Ом
С5 := Tп/R12
С5 = 5e-8  # Ф
R13 := K5*R12
R13 = 2411.2  # Ом
# Параметры остальных резисторов
# R1=R2=R3=R4=100 кОм
# Моделирование в ASIMEC
# Операционный усилитель DA1 выполняет роль сумматора сигналов
# Таким образом, результаты моделирования в среде ASIMEC полностью совпали с результатами, полученными в среде MathCAD.
# По задающему воздействию:
Umax := 1.317
Umin := 0.849
Uуст := 0.902
Uуст1 := 0.902
Uуст*1.05 = 0.9471
Uуст*0.95 = 0.8569
σмод := (Uуст1 - Umin)/Uуст1 = 0.0587583
tппизм := 0.324
tppmod := 0.123
σLмод := (Umax - Uуст)/Uуст
σLмод = 46.0089 %
σcg1 = 31.1252 %
tng1 = 0.324066
δσ := |σмод - σf|/σf = 2.0361  # %
δσ := |σLмод - σcg1|/σcg1
δσ = 47.8189 %
δtпп := |tmin - tppmod|/tmin = 0.354071  # %
δtпп := |tппизм - tng1|/tng1
δtпп = 0.0202981 %
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