Uвхmax := 240
Uвхmin := 170
Uвх := 220
Uвхnom := 310
Iвых := 5
f := 125*10^3
Uвых := 15
Uvd := 0.5
Kj := 366
Kf := 1
Bm := 0.1
y := -0.12
Kи := 0.3
T := 1/f = 8e-6
C5 := 390*10^-12
R8 := 18*10^3
f1 := 1.72/(R8*C5) = 245014
fmin := 115*10^3
fmax := 135*10^3
η := 0.8
tdead := C5*1.7/(7.6*10^-3) = 8.72368e-8
T1 := 1/(135*10^3) = 7.40741e-6
D := 0.49
ton := T1*D = 3.62963e-6
toff := T1 - ton = 3.77778e-6
Pn := 75
Pmax := Pn*1.2 = 90
Lpr1 := Uвхmin^2*ton^2*η*fmin/(2*Pmax) = 0.000194598
Ipr1 := sqrt(2*Pmax/(η*fmin*Lpr1)) = 3.17083
Dmax := 0.5
Irms := Ipr1*sqrt(Dmax/3) = 1.29449
Ioutmax := 5.5
Lsec := (Uвых + Uvd)*toff^2*fmin/(2*Ioutmax) = 2.31265e-6
Isec := (Uвых + Uvd)*toff/Lsec = 25.3197
K := sqrt(Lpr1/Lsec) = 9.17306
K := 9
Uds := Uвхmax + (Uвых + Uvd)*K = 379.5
Ipr1max := sqrt(2*Pmax/(η*fmin*Lpr1)) = 3.17083
Ipr1nom := sqrt(2*Pn/(η*f*Lpr1)) = 2.77637
ton := Ipr1nom*Lpr1/Uвхnom = 1.74282e-6
Dpr1 := 0.174
Ipr1rms := Ipr1nom*sqrt(Dpr1/3) = 0.668638
Isec := Ipr1nom*K = 24.9873
tsec := Isec*Lsec/(Uвых + Uvd) = 3.72818e-6  # время обратного хода
Dsec := 0.363
Irmssec := Isec*sqrt(Dsec/3) = 8.69184
Idcsec := Isec*Dsec/2 = 4.53519
Iacsec := Isec*sqrt(Dsec/3 - Dsec^2/4) = 7.41486
Al := 160*10^-9
Ae := 57
Pn = 75
B := 0.1
N1 := sqrt(Lpr1/Al) = 34.8746
32^2/1152 = 0.888889
N1 := 35
Pt := Pn*(1/η + 1) = 168.75
N2 := sqrt(Lsec/Al) = 3.80185
Pt := 167
N2 := 4
# Выбрал EFD 25
Sco := (Pt*10^4/(B*Kf*f*Kj*Kи*4))^(1/(1 + y)) = 0.258621
Sco := 0.393
Uvd = 0.5
Sc := 0.580
ΔB := Uвх*ton/(Ae*N1) = 1.92191e-7
Δ := 66.4/sqrt(fmax) = 0.180718
j := Kj*Sco^-0.12 = 409.406  # А/см^2  # плотность тока
j := 4.1
k2 := 1  # коэффициент, учитывающий выполнение первичной обмотки:
Sprov := k2*Ipr1/j = 0.773374  # мм^2  # сечение провода
Sprov := k2*Ipr1/j = 0.773374
Ubias := 14  # питание контроллера
Nbias := (Ubias + Uvd)*N2/(Uвых + Uvd) = 3.74194
Nbias := 4
Dpen := 7.5/sqrt(f) = 0.0212132  # глубина проникновения высокочастотного тока
# Оценив паразитную ёмкость трансформатора в
Сeqv := 50*10^-12
τ := Сeqv*Uвхnom/(0.1*Ipr1) = 4.8883e-8
# IRFB20N50K
Qg := 110*10^-9
Qgs := 33*10^-9
Igate := Qg/τ = 2.25027  # Ток затвора
Qg*f = 0.01375  # Ток на включение транзистора
Qgs*f = 0.004125  # Ток на выключение транзистора
Ucc := 15
Umiller := 5
R9 := (Ucc - Umiller)/Igate = 4.44391
# Датчик тока и его цепи
Upin3min := 0.9
R11 < □
Upin3min/Ipr1 = 0.283837  # Ом
R11 := 0.2
Pr11 := Ipr1rms^2*R11 = 0.0894152
R10 := 470
C9 := τ/R10 = 1.04006e-10
# Элементы запуска
Ustart := 17.5
Istart := 0.5*10^-3
R1 + R2 < □
(Uвх - Ustart)/Istart = 405000
R1 := 200*10^3
R2 := 200*10^3
Pr1r2 := (Uвхmax - 14.5)^2/(R1 + R2) = 0.127126
# Схема питания контроллера | D1 R4 C3
# Постоянный гистрезис
Uhist := 6
Cout := 4700*10^-6  # максимальная возможная ёмкость на выходе блока
Ipwm := 0.014 + 4.125*10^-3 + 17*10^-3 = 0.035125  # максимальный ток потребления составит
tstart := Cout*Uвых/Iвых = 0.0141
C3 > □
C3 := Ipwm*tstart/Uhist = 8.25438e-5
C3 := 100*10^-6
ton := C3*Uhist/Ipwm = 0.0170819  # Работа на кз в течение разрядки С3
Icharge := (Uвхnom - Ustart)/(R1 + R2) = 0.00073125
toff := C3*Uhist/Icharge = 0.820513
# Цепь подавления выброса от индуктивности рассеяния | D2 R3 C2
Ucl := 220
Urefl := 170
Ich := Ipr1*D/2 = 0.776854
LLpr1 := 59*10^-9
Ipr1^2*LLpr1*f/(2*(Ucl - Urefl)) = 0.000741496
tch := LLpr1*Ipr1/(Ucl - Urefl) = 3.74158e-9
Illpr1 := (Ucl - Urefl)*tch/LLpr1 = 3.17083
Rcl := 2*Ucl*(Ucl - Urefl)/(Ipr1^2*LLpr1*f) = 296697
Idch := Ucl/Rcl = 0.000741496
Prcl := Ucl^2/Rcl = 0.163129
Cc2 := 0.01*10^-6
ΔUc2 := Ich/(Cc2*f) = 621.483
Ipr1^2*LLpr1/(2*Cc2*(Ucl - Urefl)) = 0.593197
# Выходной диод
Vd4 := Uвхmax/K + Uвых = 41.6667
# Потери в диоде | MBR10100G
Uvd := 0.8
Irmssec*Uvd = 6.95348
Irev := 0.10*10^-3
Prev := Irev*Vd4*ton*f = 8.8968
Cd4 := 100*10^-12
Cd := 200*10^-12
Rd := sqrt(Lsec*(Сeqv + Cd4))/Cd = 93.1259
Prd := Cd*Vd4^2*f = 0.0434028
# Конденсатор фильтра
ncp := 10
ΔUвых := 0.5
C8 := Iвых*ncp/(ΔUвых*f) = 0.0008
Ic8 := sqrt(Irmssec^2 - Iвых^2) = 7.10972
# Три  конденсатора по 820 мкФ
ton := Ipr1nom*Lpr1/Uвхnom = 1.74282e-6
C8 := 1000*10^-6
ESR := 34*10^-3
ΔVc8pp := Iвых*ton/C8 + Isec*ESR = 0.858282
# Дополнительный фильтр | L1 C9 | TSL1112S-6R8M4R6
L1 := 6.8*10^-6
ΔUoutpp := 0.05
C9 := (ΔVc8pp - ΔUoutpp)/(4*ΔUoutpp*π^2*f^2*L1) = 3.85393e-6
C9 := 10*10^-6
ω := 1/sqrt(L1*C9) = 121268  # ms^-1
# Усилитель ошибки и его цепи | U3 R14 R15
R15 := 10*10^3
Uref := 2.5
R14 := R15*(Uвых - Uref)/Uref = 50000
10*10^3*(53 - 2.5)/2.5 = 202000
1.62
R14 := 50.5*10^3
Uвых := Uref*(R14 + R15)/R15 = 15.125
# Оптрон гальванической развязки и его цепи | U3 R16 R7 R12
# PC 817
R5 := 10*10^3
(-3.5 + 1.24)*478.9*10^6*17*10^3/(17*10^3*(100*10^3) - 17*10^3*1.053*10^3 - 3.5*478.9*10^6 + 1.24*478.9*10^6) = -30676.6
R7 := R5
Uvdpc := 0.9
Itl431 := 1*10^-3
R12 := Uvdpc/Itl431 = 900
R12 := 910
Uvdpc := 1.5
Ivdpc := 1.5*10^-3
Ir12 := Uvdpc/R12 = 0.00164835
Ir13 := Ir12 + Ivdpc = 0.00314835
Uвыхmin := 14.58
Utl431 := 2.5
R13 := (Uвыхmin - Utl431)/Ir13 = 3836.93
R13 := 3.6*10^3
# Элементы коррекции петли обратной связи C4 C10 R14
Pn = 75
C1 := 90/(η*50*(250^2 - 200^2))*(1 + acos(200/250)/π) = 0.000120483
