Uвых := 170  # выходное напряжение
Upadnap := 1  # падениен напряжения на диоде
Inag := 7
# ток нагрузки
k1 := 2
Pn := (Uвых + k1*Upadnap)*Inag = 1204  # выходная мощность
Uвхmax := 54  # максимальный порог входного напряжения
η := 0.96  # КПД
B := 0.1  # индукция
Kf := 1  # коэффициент формы
Kи := 0.3  # коэффициент заполнения окна
f := 150*10^3  # частота
Kj := 534  # коэффициенты геометрии для сердечника при 50 градусах рабочей температуры
y := -0.12
Pt := Pn*(1/η + 1) = 2458.17  # мощность трансформатора
Sco := (Pt*10^4/(B*Kf*f*Kj*Kи*4))^(1/(1 + y)) = 2.90674  # произведение Sc на So
# Выбрал ETD 44
Sco := 4.85  # см^4
(3500*10^-9)^2*16^2 = 3.136e-9
Sc := 1.742  # см^2  # сечение стали
W1 := Uвхmax*10^4/(4*Kf*B*f*Sc) = 5.16648  # количество витков первичной обмотки
W1 := 5
Uвхmin := 42  # минимальный порог входного напряжения
I1 := Pn/(Uвхmin*η) = 29.8611  # ток в первичной обмотке
j := Kj*Sco^-0.12 = 441.827  # А/см^2  # плотность тока
j := 4.41
k2 := 1  # коэффициент, учитывающий выполнение первичной обмотки:
Sprov := k2*I1/j = 6.77123  # мм^2  # сечение провода
Uвыхmin := 126
Lsr := 10.3  # см  # средняя длина витка
ktr := 3
Itv12 := Pn/Uвыхmin = 9.55556  # ток вторичной обмотки
ρ11 := 0.0175*10^6/10^2 = 175  # мкОм/см  # удельное сопротивление
Itv11 := ktr*Itv12 = 28.6667  # ток первичной обмотки
R1 := Lsr*W1*ρ11*10^-6 = 0.0090125  # Ом  # сопротивление первичной обмотки
Sc := 174
fmin := 150*10^3
W2 := W1*(Uвых + Upadnap*k1)/54 = 15.9259
W0 := 1/(4*Kf*B*fmin*Sc*10^-6) = 0.0957854
W2 := 16  # количество витков вториной обмотки
W1 := Uвхmin*W0 = 4.02299
k3 := 1  # коэффициент, учитывающий выполнение вторичной обмотки
W2 := W1*ktr = 12.069
ΔPm1 := k3*(k2*I1)^2*R1 = 8.03632  # Потери в меди первичной обмотки
Bm := Uвхmin/(4*Kf*W1*fmin*Sc*10^-6) = 0.1
k4 := 1  # коэффициент, учитывающий выполнение вторичной обмотки
Smprov2 := k4*Inag/j = 1.5873  # сечение провода вторичной обмотки
fmax := 200*10^3
ρ12 := ρ11
Δ := 66.4/sqrt(fmax) = 0.148475
R2 := Lsr*W2*ρ12*10^-6 = 0.0217543  # сопротивление вторичной обмотки
k5 := 1
j1 := Itv11/(1.5*4) = 4.77778
ΔPm2 := k5*(k4*I1)^2*R2 = 19.398  # потери меди во вторичной обмотки
ΔPm := ΔPm2 + ΔPm1 = 27.4343  # Общие потери в меди
Pуд := 1.64*10^-3*f^1.31*B^2.49 = 32.0275  # удельные потери в феррите
M := 94  # масса сердечника
ΔPc := Pуд*M*10^-3 = 3.01059  # потери в сердечнике
ΔPΣ := ΔPm + ΔPc = 30.4449  # суммарные потери в трансформаторе
H := 22.5
L := 43.8
B := 15.2
l1 := 8.65
l0 := 15.2
h := 16.1
St := 2*(H*L + 2*H*B + B*L + 2*l1*(l0 + 2*l1 + 2h))*10^-2 = 58.6422  # тепловая поверхность для Ш-образного сердечника
St := 80
# Потери на единицу поверхности
ΔPΣ/St = 0.380562
kT := 1.2*10^-3  # Вт/см^2*C  # коэффициент теплоотдачи
# Перегрев поверхности
ΔT := 0.795/kT = 662.5
Iвых := 7
Ktr := 3
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kper := Uвхmax/(2*Uвых) = 0.158824
f := 200*10^3
Rload := 1.71
Rac := 8/π^2*Ktr^2*Rload = 12.4747
Q := 0.3
m := 6
Rac := 8.5
Lr := Rac*Q/(2*π*f) = 2.02923e-6
Lu := m*Lr = 1.21754e-5
Cr := Lr/(Rac^2*Q^2) = 3.12069e-7
Cr := 2*Cr/Ktr^2 = 6.93486e-8
fllc := 1/(2*π*sqrt((Lr + Lu)*Cr)) = 160357
# Расчёт основных параметров преобразователя
Ivt := 1000/(2*η*Uвхmin) = 12.4008  # ток транзистора в открытом состоянии
# Статические потери в одном транзисторе
Pvtstat := Ivt^2*□  # error: Пустой местозаполнитель.
